# Si 4nd

units			metal
atom_style		atomic
boundary		p p p
newton          off

#box             tilt large
read_data		structure.in

mass			1 72.64
mass            2 121.76
mass			3 127.60

pair_style	    nequip
pair_coeff      * * ../../../../../../../../../../frozen_model.pb Ge Sb Te
#pair_style		deepmd ../../../frozen_model.pb
#pair_coeff		* *
#pair_style		tersoff
#pair_coeff		* * Si.tersoff Si

velocity		all create 600.0 1031
compute         pe all pe/atom
compute         2 all pressure thermo_temp

#read_dump       init.dump 100 x y z vx vy vz box yes replace yes
#fix				1 all nve
fix				1 all nvt temp 300 300 1.00
#fix				1 all npt temp 0.0001 0.0001 10. iso 0 0 10.
#fix             1 all box/relax iso 0.0 vmax 1e-4
fix             pho all phonon 1 100 100 GAMMA dynmat

thermo_style    custom step temp etotal pe ke vol
thermo_modify   format float %.15g
thermo			100

#dump			myDump all atom 100 atom.dump
dump			1 all custom 100 out.dump id element mass type x y z fx fy fz vx vy vz c_pe
dump_modify		1 element Ge Sb Te

#minimize        1e-7 1e-3 1000 10000
#timestep		0.0001
run				200
